variable number	equal 1
variable ofreq	equal 1000000
variable efreq	equal 1000

units lj

dimension 3

newton off

boundary  p p p

atom_style hybrid bond ellipsoid
atom_modify sort 0 1.0

# Pair interactions require lists of neighbours to be calculated
neighbor 1.0 nsq
neigh_modify every 1 delay 0 check yes

read_data input.lammps
#read_restart restart.30000
restart 1000000 oxdna.restart.*


shell mkdir output

set atom * mass 3.1575

group all type 1 4

# oxDNA bond interactions - FENE backbone
bond_style oxdna2/fene
bond_coeff * 2.0 0.25 0.7564

# oxDNA pair interactions
pair_style hybrid/overlay oxdna2/excv oxdna2/stk oxdna2/hbond oxdna2/xstk oxdna2/coaxstk oxdna2/dh
pair_coeff * * oxdna2/excv    2.0 0.7 0.675 2.0 0.515 0.5 2.0 0.33 0.32
pair_coeff * * oxdna2/stk     0.1 6.0 0.4 0.9 0.32 0.6 1.3 0 0.8 0.9 0 0.95 0.9 0 0.95 2.0 0.65 2.0 0.65
pair_coeff * * oxdna2/hbond   0.0 8.0 0.4 0.75 0.34 0.7 1.5 0 0.7 1.5 0 0.7 1.5 0 0.7 0.46 3.141592653589793 0.7 4.0 1.5707963267948966 0.45 4.0 1.5707963267948966 0.45
pair_coeff 1 4 oxdna2/hbond   1.0678 8.0 0.4 0.75 0.34 0.7 1.5 0 0.7 1.5 0 0.7 1.5 0 0.7 0.46 3.141592653589793 0.7 4.0 1.5707963267948966 0.45 4.0 1.5707963267948966 0.45
pair_coeff 2 3 oxdna2/hbond   1.0678 8.0 0.4 0.75 0.34 0.7 1.5 0 0.7 1.5 0 0.7 1.5 0 0.7 0.46 3.141592653589793 0.7 4.0 1.5707963267948966 0.45 4.0 1.5707963267948966 0.45
pair_coeff * * oxdna2/xstk    47.5 0.575 0.675 0.495 0.655 2.25 0.791592653589793 0.58 1.7 1.0 0.68 1.7 1.0 0.68 1.5 0 0.65 1.7 0.875 0.68 1.7 0.875 0.68
pair_coeff * * oxdna2/coaxstk 58.5 0.4 0.6 0.22 0.58 2.0 2.891592653589793 0.65 1.3 0 0.8 0.9 0 0.95 0.9 0 0.95 40.0 3.116592653589793
pair_coeff * * oxdna2/dh      0.1 1.0 0.815

#0.815 carica


#xxxcheck gamma e T
# NVE ensemble
#fix 1 all nve/dot
fix 1 all nve/dotc/langevin 0.1 0.1 78.9375 xxxseedxxx angmom 10
#fix 1 all nve/asphere
#fix 2 all langevin 0.1 0.1 75 xxxseedxxx angmom 10

timestep 0.01

comm_style tiled
fix 3 all balance 10000 1.1 rcb

#compute mol all chunk/atom molecule
#compute mychunk all vcm/chunk mol
#fix 4 all ave/time 10000 1 10000 c_mychunk[1] c_mychunk[2] c_mychunk[3] file vcm.txt mode vector

compute quat all property/atom quatw quati quatj quatk

dump 1 all custom ${ofreq} output/traj.xyz id type xu yu zu c_quat[1] c_quat[2] c_quat[3] c_quat[4]
dump_modify 1 sort id   append yes

#compute stuff
#Compute gyration radius
compute rg all gyration
variable Rg   equal c_rg
fix Rg	       all print 1000 "$(step) ${Rg}"  	       			    append output/Rg.dat		    screen no title "#timestep Rg"

#Compute COM
compute com all com
variable COMx   equal c_com[1]
variable COMy   equal c_com[2]
variable COMz   equal c_com[3]
fix COM	       all print 1000 "$(step) ${COMx} ${COMy} ${COMz}"		    append output/COM.dat	    screen no title "#timestep COMx COMy COMz"


compute erot all erotate/asphere
compute ekin all ke
compute epot all pe
variable erot equal c_erot
variable ekin equal c_ekin
variable epot equal c_epot
variable etot equal c_erot+c_ekin+c_epot
fix 5 all print ${efreq} "$(step)  ekin = ${ekin} |  erot = ${erot} | epot = ${epot} | etot = ${etot}" screen yes

#dump out all custom ${ofreq} out.${number}.txt id x y z vx vy vz fx fy fz tqx tqy tqz
#dump_modify out sort id
#dump_modify out format line "%d   %13.6le %13.6le %13.6le  %13.6le %13.6le %13.6le  %13.6le %13.6le %13.6le  %13.6le %13.6le %13.6le"


run 1000000000


#write_restart config.${number}.*
